*Heading
** Job name: Job-3 Model name: Model-1
** Generated by: Abaqus/CAE 2023
*Preprint, echo=NO, model=NO, history=NO, contact=NO
**
** PARTS
**
*Part, name=Part-1
*Node
      1, 0.00749999983, -0.0236799996, 0.00300000003
      2, 0.00749999983, -0.0386799984, 0.00300000003
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*Element, type=C3D8R
  1,   90,  505, 1927,  451,    1,   33,  397,   56
  2,  505,  506, 1928, 1927,   33,   34,  398,  397
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*Nset, nset=Set-1, generate
    1,  3465,     1
*Elset, elset=Set-1, generate
    1,  2480,     1
** Section: Section-1
*Solid Section, elset=Set-1, controls=EC-1, material=Material-1
,
*End Part
**
**
** ASSEMBLY
**
*Assembly, name=Assembly
**
*Instance, name=Part-1-1, part=Part-1
*End Instance
**
*Nset, nset=Set-1, instance=Part-1-1
    1,    2,    3,    4,    5,    6
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*Elset, elset=Set-1, instance=Part-1-1, generate
   1,  400,    1
*Nset, nset=Set-2, instance=Part-1-1
   23,   24,   25,   26,   27,   28
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*Elset, elset=Set-2, instance=Part-1-1, generate
 1761,  2160,     1
*End Assembly
**
** ELEMENT CONTROLS
**
*Section Controls, name=EC-1, ELEMENT DELETION=YES, hourglass=STIFFNESS
1., 1., 1.
**
** MATERIALS
**
*Material, name=Material-1
*Damage Initiation, criterion=DUCTILE
 0.31,  0.33, 0.001
*Damage Evolution, type=DISPLACEMENT
 2e-05,
*Density
4900.,
*Elastic
 1.1e+11, 0.33
*Plastic
 3.16282e+08,         0.
 3.25202e+08,  0.0045653
 3.36672e+08, 0.00687198
  3.4814e+08, 0.00996815
 3.59608e+08,  0.0130643
 3.67249e+08,  0.0161811
 3.74891e+08,  0.0192978
 3.83802e+08,  0.0239867
 3.93984e+08,  0.0302477
 4.02896e+08,  0.0349366
 4.05428e+08,  0.0404493
 4.13061e+08,  0.0459345
 4.20692e+08,  0.0522092
 4.24494e+08,   0.059294
 4.28296e+08,  0.0663788
 4.32095e+08,  0.0742531
 4.34625e+08,  0.0805552
 4.35876e+08,  0.0876538
 4.37127e+08,  0.0947523
 4.38378e+08,   0.101851
 4.38354e+08,   0.108956
 4.38338e+08,   0.113693
 4.38319e+08,    0.11922
**
** BOUNDARY CONDITIONS
**
** Name: BC-1 Type: Symmetry/Antisymmetry/Encastre
*Boundary
Set-1, ENCASTRE
** ----------------------------------------------------------------
**
** STEP: Step-1
**
*Step, name=Step-1, nlgeom=YES
*Dynamic, Explicit
, 10.
*Bulk Viscosity
0.06, 1.2
** Mass Scaling: Semi-Automatic
**               Whole Model
*Fixed Mass Scaling, factor=50000.
**
** BOUNDARY CONDITIONS
**
** Name: BC-2 Type: Velocity/Angular velocity
*Boundary, type=VELOCITY
Set-2, 1, 1
Set-2, 2, 2, 0.001
Set-2, 3, 3
Set-2, 4, 4
Set-2, 5, 5
Set-2, 6, 6
**
** OUTPUT REQUESTS
**
*Restart, write, number interval=1, time marks=NO
**
** FIELD OUTPUT: F-Output-1
**
*Output, field, variable=PRESELECT
**
** HISTORY OUTPUT: H-Output-1
**
*Output, history, variable=PRESELECT
*End Step
